// COMSOL Multiphysics 6.4.0.293 model "COMSOL64_3D_Bloch_ModeFollowing_Base.mph"
// Outline of the model tree

Parameters
  a = 1[um]  // Square primitive-cell pitch
  lambda_ref = 1[um]  // Eigenfrequency shift wavelength
  t_pml_bottom = 0.5[um]
  t_substrate = 1[um]
  t_structure = 0.5[um]
  t_superstrate = 1[um]
  t_pml_top = 0.5[um]
  t_total = t_pml_bottom+t_substrate+t_structure+t_superstrate+t_pml_top
  n_bottom = 3.4  // Placeholder real substrate/PML index
  n_structure = 3.4  // Placeholder real structure-layer index
  n_pillar = 1.5  // Lossless asymmetric test-pillar index
  n_top = 1  // Placeholder real superstrate/PML index
  pillar_x = 0.46*a  // Asymmetric test-pillar x width
  pillar_y = 0.22*a  // Asymmetric test-pillar y width
  qx = 0  // Manual reduced Bloch coordinate x; set use_k_scan=0
  qy = 0  // Manual reduced Bloch coordinate y; set use_k_scan=0
  k = 0  // Dimensionless ordered path coordinate
  use_k_scan = 1  // 1: use k path; 0: use manual qx/qy
  path_mode = 2  // 0: q=(k,0); 1: Gamma-X-M-Gamma; 2: M-Gamma-X/Y-M selected by path_axis
  path_axis = 0  // For path_mode=2: 0 selects X, 1 selects Y
  qx_scan = if(path_mode<0.5,k,if(path_mode<1.5,if(k<=1,0.5*k,if(k<=2,0.5,0.5*(3-k))),if(k<=1,0.5*(1-k),if(k<=2,if(path_axis<0.5,0.5*(k-1),0),if(path_axis<0.5,0.5,0.5*(k-2))))))
  qy_scan = if(path_mode<0.5,0,if(path_mode<1.5,if(k<=1,0,if(k<=2,0.5*(k-1),0.5*(3-k))),if(k<=1,0.5*(1-k),if(k<=2,if(path_axis<0.5,0,0.5*(k-1)),if(path_axis<0.5,0.5*(k-2),0.5)))))
  qx_active = if(use_k_scan>0.5,qx_scan,qx)
  qy_active = if(use_k_scan>0.5,qy_scan,qy)
  kBx = 2*pi*qx_active/a  // Physical Floquet wavevector x in rad/m
  kBy = 2*pi*qy_active/a  // Physical Floquet wavevector y in rad/m
  periodic_x_dx = a
  periodic_y_dy = a
  floquet_phase_x = exp(-i*kBx*periodic_x_dx)
  floquet_phase_y = exp(-i*kBy*periodic_y_dy)

Coordinate systems
  pmlbot: PML "完美匹配层" on domains 1, 6
  pmltop: PML "完美匹配层 2" on domains 5, 10

Geometry
  geom1 "几何 1" (3D, length unit m)
    stack: Block "长方体"
      size = {a, a, t_total}
      base = center
      layername = {层 1, 层 2, 层 3, 层 4}
      layer = {t_pml_bottom, t_substrate, t_structure, t_superstrate}
      layernameold = {层 1, 层 2, 层 3, 层 4}
    pillar: Block "Asymmetric rectangular validation pillar" | size = {pillar_x, pillar_y, t_total}; base = center
    fin: Finalize "形成联合体"

Materials
  matbottom: Common "Placeholder bottom medium" on domains 1, 2, 6, 7
    RefractiveIndex: RefractiveIndex "折射率"
      n = n_bottom
      ki = 0
  matstructure: Common "Placeholder structure layer" on domains 3
    RefractiveIndex: RefractiveIndex "折射率"
      n = n_structure
      ki = 0
  matpillar: Common "Lossless asymmetric validation pillar" on domains 8
    RefractiveIndex: RefractiveIndex "折射率"
      n = n_pillar
      ki = 0
  mattop: Common "Placeholder top medium" on domains 4, 5, 9, 10
    RefractiveIndex: RefractiveIndex "折射率"
      n = n_top
      ki = 0

Physics
  ewfd: ElectromagneticWavesFrequencyDomain "电磁波，频域" on all domains
    dependent variable E = {Ex, Ey, Ez}
    ShapeProperty.order_electricfield = 2
    wee1: WaveEquationElectric "波动方程，电 1" (default)
    pec1: PerfectElectricConductor "理想电导体 1" (default)
    init1: init "初始值 1" (default)
    pcx: PeriodicCondition "Floquet x: -x source to +x manual destination" on boundaries 1, 4, 7, 10, 13, 48-52
      PeriodicType = Floquet
      Floquet_source = UserDefined
      kFloquet = {kBx, kBy, 0}
      manualDestinationSelection = 1
      destinationDomains: boundaries 48-52
    pcy: PeriodicCondition "Floquet y: -y source to +y manual destination" on boundaries 2, 5, 8, 11, 14, 17-21
      PeriodicType = Floquet
      Floquet_source = UserDefined
      kFloquet = {kBx, kBy, 0}
      manualDestinationSelection = 1
      destinationDomains: boundaries 17-21

Mesh
  mesh1 "网格 1"
    size: MeshSizeDefault "大小" | hmax = 3.5E-7; hmin = 6.3E-8; hcurve = 0.6; hnarrow = 0.5; hgrad = 1.5
    size1: Size "大小 1" on entire geometry | hmax = a/6; hmin = a/30; custom = on
    ftri1: FreeTri "Free triangular source mesh for sweep-compatible column" on boundaries 3, 24
    swe1: Sweep "扫掠 1" on all domains

Studies
  std1 "Manual single Bloch point: set use_k_scan=0, qx, qy"
    eig: Eigenfrequency "特征频率" | neigs = 20; shift = c_const/lambda_ref
  stdmf "EXPERIMENTAL / UNSTABLE: k sweep with COMSOL 6.4 Mode Following"
    param: Parametric "k sweep: M-Gamma-X/Y-M demonstration" | pname = k; plistarr = range(0,0.25,3)
    eig: Eigenfrequency "Experimental Mode Following; inspect finite modes at every k"
      neigs = 20
      shift = c_const/lambda_ref
      modefollowing = on

Solver configurations
  sol1 "解 1" (study std1)
    v1: Variables "因变量 1"
    e1: Eigenvalue "特征值求解器 1"
      d1: Direct "建议的直接求解器 (ewfd)"
  solmf "解" (study stdmf)
    v1: Variables "因变量 1"
    e1: Eigenvalue "特征值求解器 1" | neigs = 20; shift = c_const/lambda_ref; modefollowing = on
      mf1: ModeFollowing "EXPERIMENTAL / UNSTABLE continuation aid"
      d1: Direct "建议的直接求解器 (ewfd)"

Datasets
  dset1: Solution | solution = sol1
  dset2: Solution | solution = solmf